# Конищев Артём Андреевич, П-229
# ЗАДАНИЕ 1
# Минимизировать функцию одной переменной.
# (Вариант 8)
f(x) := (x - 13)^2
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x := 0
Given
x ≥ 0
x ≤ 25
x_min := Minimize(f, x)
x_min = 13
f(x_min) = 0
