# Альшев Дмитрий Алексеевич П-229
# вариант 0366 Задание 13
# Условие: Построить ЭQ и ЭM в статически определимой балке
ORIGIN := 1
q := 1*N/m
l := 1 m
F := 2*q*l
q_1 := 2*q
l_1 := l
l_2 := 2*l
M := -2*q*l^2
Y_A := -0.75*q*l
Y_B := 2.75*q*l
Q(z) :=
    Y_A if 0 ≤ z < l
    (Y_A + F - integral(q, z = l .. z)) if l ≤ z < 3*l
    ((Y_A + F - integral(q, z = l .. 3*l)) - integral(q_1, z = 3*l .. z)) if 3*l ≤ z ≤ 4*l
    0 otherwise
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M(z) := (integral(Q(z), z = 0 .. z) - M)
2.248*1.25/2 + 1.25 = 2.655
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