# Конищев Артём Андреевич, П-229
ВАРИАНТ - 8
# ЗАДАНИЕ 2
# Вычислите определенные и неопределенные интегралы.
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a := 0.6
b := 1.4
f(x) := sqrt(x^2 + 5)/(2*x + sqrt(x^2 + 0.5))
integral(f(x), x = a .. b) = 0.629839
integral(f(x), x) → integral(sqrt(x^2 + 5)/(2*x + sqrt(x^2 + 0.5)), x)
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