# Конищев Артём Андреевич, П-229
ВАРИАНТ - 8
# ЗАДАНИЕ 3
# Определить методом Гаусса собственные числа матрицы. Определить собственные
# векторы. Результат проверить с помощью встроенных функций MathCAD.
# 1. Ввод исходных данных
ORIGIN := 1
A := [1, 1.5, 2.5, 3.5; 1.5, 1, 2, 1.6; 2.5, 2, 1, 1.7; 3.5, 1.6, 1.7, 1]
E := identity(4)
# 2. Определение собственных чисел (аналитический метод)
|A - λ*E| solve → [0.135785136389; -2.67265144883; 7.50359466651; -0.966728354068]
λ_1 := 0.135785136389
λ_2 := -2.67265144883
λ_3 := 7.50359466651
λ_4 := -0.966728354068
# 3. Определение собственных векторов (сведение к СЛАУ)
x_1 := 1
x_2 := 1
x_3 := 1
Given
(1 - L)*x_1 + 1.5*x_2 + 2.5*x_3 + 3.5*1 == 0
1.5*x_1 + (1 - L)*x_2 + 2*x_3 + 1.6*1 == 0
2.5*x_1 + 2*x_2 + (1 - L)*x_3 + 1.7*1 == 0
Vec(L) := Find(x_1, x_2, x_3)  # 4. Проверка с помощью встроенных функций Mathcad
λ := eigenvals(A)
v_1 := Vec(λ_1) = [0.832787; -1.56822; -0.74695]
λ = [-2.67265; -0.966728; 0.135785; 7.50359]
v_2 := Vec(λ_2) = [-1.17478; -0.197959; 0.444605]
# функция Vec вернет матрицу-столбец из трех верхних координат. Четвертая всегда = 1.
V := eigenvecs(A)
v_3 := Vec(λ_3) = [1.06489; 0.770787; 0.907775]
V = [
    0.726203, -0.0785266, 0.383696, 0.565013;
    0.12237, 0.543793, -0.722538, 0.408967;
    -0.274836, -0.757654, -0.344148, 0.48165;
    -0.618158, 0.352253, 0.460737, 0.530583
]
v_4 := Vec(λ_4) = [-0.222927; 1.54376; -2.15088]
check_1 := V[:, 3]/V[4, 3] = [0.832787; -1.56822; -0.74695; 1]
check_2 := V[:, 1]/V[4, 1] = [-1.17478; -0.197959; 0.444605; 1]
check_3 := V[:, 4]/V[4, 4] = [1.06489; 0.770787; 0.907775; 1]
check_4 := V[:, 2]/V[4, 2] = [-0.222927; 1.54376; -2.15088; 1]
