# Конищев Артём Андреевич, П-229
# ЗАДАНИЕ 4
# Провести полное исследование функции. Построить график функции и ее производной.
# Производную найти символьно и численно.
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ВАРИАНТ - 8
# 0. Ввод исходной функции
y(x) := (x^2 - 6*x + 4)/x
# 1. Область определения и точки разрыва
# Область определения: x от минус бесконечности до плюс бесконечности, x не равно 0. Точка разрыва: x = 0.
# 2. Точки пересечения с осями
y(x) solve, x → [sqrt(5) + 3; 3 - sqrt(5)]
# 3. Четность и нечетность
y(-x) → -(x^2 + 6*x + 4)/x
# Функция общего вида
# 4. Интервалы монотонности и экстремумы
dy(x) := d/dx(y(x)) → (2*x - 6)/x - (x^2 - 6*x + 4)/x^2
dy_num(x) := d/dx(y(x))
dy(x) solve, x → [2; -2]
y(2) = -2
y(-2) = -10
# 5. Интервалы выпуклости/вогнутости и точки перегиба
d2y(x) := d^2/dx^2(y(x)) → 2*(x^2 - 6*x + 4)/x^3 - 2*(2*x - 6)/x^2 + 2/x
d2y(x) solve, x →  # error: Решение не было найдено.
# точек перегиба нет
# При x > 0 функция вогнутая (т.к. d2y > 0), при x < 0 — выпуклая
# 6. Асимптоты графика функции
k := limit(y(x)/x, x → ∞) → 1
b := limit(y(x) - k*x, x → ∞) → -6
y_as(x) := x - 6
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