# Конищев Артём Андреевич, П-229
# ЗАДАНИЕ 5
# Решить неоднородную систему линейных алгебраических уравнений. Использовать
# встроенные функции MathCAD (lsolve, given-find) и один из численных методов.
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ВАРИАНТ - 8
# 1. Метод 1: Вычислительный блок Given-Find
y := 1
z := 1
x := 1
Given
-2*x + y - z == 5
x - 2*y - 4*z == -1
3*x + y - 2*z == 2
[X_1; Y_1; Z_1] := Find(x, y, z)
[X_1; Y_1; Z_1] = [-0.818182; 2.27273; -1.09091]
# 2. Метод 2: Встроенная функция lsolve
M := [-2, 1, -1; 1, -2, -4; 3, 1, -2]
# Создаем вектор свободных членов v (размер 3х1):
v := [5; -1; 2]
Sol := lsolve(M, v)
Sol = [-0.818182; 2.27273; -1.09091]
# 3. Метод 3: Численный матричный метод (Обратная матрица)
X_mat := M^-1*v  # Систему можно решить, умножив обратную матрицу коэффициентов на вектор свободных членов.
X_mat = [-0.818182; 2.27273; -1.09091]
# 4. Графическое сопровождение (3D-график)
z1(x, y) := -2*x + y - 5
z2(x, y) := (x - 2*y + 1)/4
z3(x, y) := (3*x + y - 2)/2
# [component: inputs z1, z2, z3]
