# Конищев Артём Андреевич, П-229
ВАРИАНТ - 8
# ЗАДАНИЕ 6.1
# Решите обыкновенное дифференциальное уравнение методом Эйлера.
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# Метод Эйлера — это численный метод, где мы шаг за шагом вычисляем следующее значение функции, опираясь на предыдущее. В Mathcad это реализуется через ранжированную переменную (цикл).
f(x, y) := 0.218*(x^2 + sin(1.6*x)) + 0.718*y
x[0] := 0.2
y[0] := 0.25
# 2. Настраиваем сетку интегрирования:
# Зададим конец отрезка, число шагов и сам шаг
x_end := 2
N := 50
h := (x_end - x[0])/N
i := 0 .. N - 1
x[i + 1] := x[i] + h
y[i + 1] := y[i] + h*f(x[i], y[i])
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