# Конищев Артём Андреевич, П-229
ВАРИАНТ - 8
# ЗАДАНИЕ 6.2
# Решить дифференциальное уравнение движения второго порядка. Использовать
# встроенную функцию MathCAD (rkfixed). При интегрировании от начальных условий до
# установившегося режима.
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# Функция rkfixed не умеет решать уравнения второго порядка напрямую. Нам нужно свести его к системе двух уравнений первого порядка.
ORIGIN := 1
# 1. Вводим константы:
m := 0.53
k := 3
c := 3
P_0 := 0.7
ω := 20
# 2. Случай А: Однородная система (P(t) = 0)
Y_0 := [0; 1]
# Создаем вектор-функцию правых частей системы:
D_a(t, y) := [y[2]; (-k*y[2] - c*y[1])/m]
Z_a := rkfixed(Y_0, 0, 10, 1000, D_a)
t_a := Z_a[:, 1]
x_a := Z_a[:, 2]
v_a := Z_a[:, 3]
# Шаг 3. Решение случая Б
D_b(t, y) := [y[2]; (P_0*sin(ω*t)*(-k)*y[2] - c*y[1])/m]
Z_b := rkfixed(Y_0, 0, 10, 1000, D_b)
t_b := Z_b[:, 1]
x_b := Z_b[:, 2]
v_b := Z_b[:, 3]
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