# Конищев Артём Андреевич, П-229
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ВАРИАНТ - 8
ORIGIN := 1
X := [1; 1.1; 1.2; 1.3; 1.4; 1.5; 1.6; 1.7; 1.8; 1.9; 2]
Y := [0.686; 0.742; 0.767; 0.646; 0.807; 0.774; 0.97; 0.932; 0.936; 0.978; 1.048]
x_p := 1.55
C := line(X, Y)
C = [0.299273; 0.363273]
b := C[1]
a := C[2]
f(x) := a*x + b
y_reg := f(x_p)
y_reg = 0.862345
# проверка стандратной функцией интерполяции
y_int := linterp(X, Y, x_p)
y_int = 0.872
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